!EPRI Feeder J1, OpenDSS
! This Circuit model is provided to the public by EPRI (Electric Power Research Institute) as part of the Distributed Renewables Research Program (P174).
! Please feel free to use this circuit model for further research/study.
! For reference purposes, please use: EPRI Feeder J1, Distributed PV (DPV) Monitoring and Feeder Analysis, dpv.epri.com, 2013
clear
set defaultbasefrequency=60

Redirect LoadShapes_mod.dss
Redirect Substation.dss
Redirect LineCodes.dss
Redirect Lines.dss
Redirect Transformers.dss
Redirect LoadsInd.dss
Redirect Services.dss
Redirect Capacitors.dss
Redirect Regulators.dss
!Redirect ExistingPV.txt

batchedit load..* vmin=0.33 vmax=3.0
set maxiter=100
set maxcontroliter=100

Set voltagebases=[69, 12.47, 7.2, 0.480, 0.416]
Calcv

set loadmult=1.10
Solve

redirect monitors.dss

Buscoords buscoords.dss

solve
!plot
